*Heading
** Job name: Job-1 Model name: Model-1
** Generated by: Abaqus/CAE Student Edition 2018
*Preprint, echo=NO, model=NO, history=NO, contact=NO
**
** PARTS
**
*Part, name="orphan mesh"
*Node
      1,           0.,           0.
      2,           5.,           0.
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*Element, type=CPS4
  1,   1,   2,  33,  32
  2,   2,   3,  34,  33
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*Elset, elset=Set-1_alpha_0
 161, 162, 163, 164, 165, 166
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*Elset, elset=Set-1_alpha_1
   1,   2,   3,   4,   5,   6
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** Section: Section-2_alpha_1
*Solid Section, elset=Set-1_alpha_1, material=Material-2_alpha_1
0.1,
** Section: Section-1_alpha_0
*Solid Section, elset=Set-1_alpha_0, material=Material-1_alpha_0
0.1,
*End Part
**
**
** ASSEMBLY
**
*Assembly, name=Assembly
**
*Instance, name="orphan mesh-1", part="orphan mesh"
*End Instance
**
*Nset, nset=Set-1, instance="orphan mesh-1", generate
   1,  621,   31
*Nset, nset=Set-2, instance="orphan mesh-1"
 651,
*Elset, elset=_Surf-1_S2, internal, instance="orphan mesh-1", generate
  30,  600,   30
*Surface, type=ELEMENT, name=Surf-1
_Surf-1_S2, S2
*End Assembly
**
** MATERIALS
**
*Material, name=Material-1_alpha_0
*Elastic
1., 0.3
*Material, name=Material-2_alpha_1
*Elastic
 2e+10, 0.3
** ----------------------------------------------------------------
**
** STEP: Step-1
**
*Step, name=Step-1, nlgeom=NO
*Static
1., 1., 1e-05, 1.
**
** BOUNDARY CONDITIONS
**
** Name: BC-1 Type: Displacement/Rotation
*Boundary
Set-1, 1, 1
Set-1, 2, 2
Set-1, 6, 6
**
** LOADS
**
** Name: Load-1   Type: Concentrated force
*Cload
Set-2, 1, 1000.
Set-2, 2, 1000.
** Name: Load-2   Type: Pressure
*Dsload
Surf-1, P, -1000.
**
** OUTPUT REQUESTS
**
*Restart, write, frequency=0
**
** FIELD OUTPUT: F-Output-1
**
*Output, field, variable=PRESELECT
**
** HISTORY OUTPUT: H-Output-1
**
*Output, history, variable=PRESELECT
*End Step
