*Heading
** Job name: Job-1_potato_in_pot Model name: Model-1
** Generated by: Abaqus/CAE Student Edition 2018
*Preprint, echo=NO, model=NO, history=NO, contact=NO
**
** PARTS
**
*Part, name="orphan mesh"
*Node
      1,  -33.5753288,  -23.1299591
      2,  -31.2597904,  -23.1299591
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*Element, type=CPS4
  1,   1,   2,  32,  31
  2,   2,   3,  33,  32
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*Elset, elset=Set-1_alpha_0
   1,   2,   3,   4,   5,   6
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*Elset, elset=Set-1_alpha_1
  33,  34,  35,  36,  37,  38
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*Nset, nset=Set-3
 367, 397, 398, 428, 429, 459, 460, 461, 491, 492, 493, 523, 524, 525, 555
*Nset, nset=Set-4
 106, 107, 108, 138, 139, 140, 170, 171, 172, 202, 203, 233, 234
** Section: Section-1_alpha_0
*Solid Section, elset=Set-1_alpha_0, material=Material-1_alpha_0
0.1,
** Section: Section-2_alpha_1
*Solid Section, elset=Set-1_alpha_1, material=Material-2_alph_1
0.1,
*End Part
**
**
** ASSEMBLY
**
*Assembly, name=Assembly
**
*Instance, name="orphan mesh-1", part="orphan mesh"
*End Instance
**
*End Assembly
**
** MATERIALS
**
*Material, name=Material-1_alpha_0
*Elastic
1.,0.
*Material, name=Material-2_alph_1
*Elastic
 2e+12, 0.3
** ----------------------------------------------------------------
**
** STEP: Step-1
**
*Step, name=Step-1, nlgeom=NO
*Static
1., 1., 1e-05, 1.
**
** BOUNDARY CONDITIONS
**
** Name: BC-1 Type: Displacement/Rotation
*Boundary
"orphan mesh-1".Set-3, 1, 1
"orphan mesh-1".Set-3, 2, 2
"orphan mesh-1".Set-3, 6, 6
**
** LOADS
**
** Name: Load-1   Type: Concentrated force
*Cload
"orphan mesh-1".Set-4, 1, 100.
**
** OUTPUT REQUESTS
**
*Restart, write, frequency=0
**
** FIELD OUTPUT: F-Output-1
**
*Output, field, variable=PRESELECT
**
** HISTORY OUTPUT: H-Output-1
**
*Output, history, variable=PRESELECT
*End Step
